*Heading
** Job name: FC Model name: Field Change
** Generated by: Abaqus/CAE 2019
*Preprint, echo=NO, model=NO, history=NO, contact=NO
**
** PARTS
**
*Part, name=Bolt
*Node
      1, -0.0125000002, 0.0350000001,           0.
      2, -0.0125000002, -0.0649999976,           0.
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*Element, type=C3D10
   1,  836,  837,  838,  839, 1445, 1444, 1443, 1447, 1446, 1448
   2,  839,  837,  838,  420, 1446, 1444, 1448, 1450, 1449, 1451
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*Nset, nset=Bolt_All, generate
    1,  9595,     1
*Elset, elset=Bolt_All, generate
    1,  5888,     1
*Nset, nset="Preload Region"
    1,    8,    9,   10,   11,   12
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*Elset, elset="Preload Region"
  935, 1140, 1165, 1172, 1719, 1759
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*Elset, elset="_Contact 1_S3", internal
   77,  136,  185,  196,  219,  404
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*Elset, elset="_Contact 1_S2", internal
  137,  242,  425, 1561
*Elset, elset="_Contact 1_S1", internal
  216, 1336, 1565, 1892
*Elset, elset="_Contact 1_S4", internal
  560,  635, 1142, 1360, 1538, 1839, 2109
*Surface, type=ELEMENT, name="Contact 1"
"_Contact 1_S3", S3
"_Contact 1_S2", S2
"_Contact 1_S4", S4
"_Contact 1_S1", S1
*Elset, elset="_Contact 2_S3", internal
 3106, 3107, 3108, 3462, 3531, 3851
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*Elset, elset="_Contact 2_S4", internal
 3146, 4099, 4690, 4794, 5367, 5622, 5682, 5706, 5710, 5748
*Elset, elset="_Contact 2_S2", internal
 3615, 4639, 5250, 5645, 5658, 5692, 5741
*Elset, elset="_Contact 2_S1", internal
 5190, 5384, 5400, 5402, 5413, 5414, 5496, 5523, 5551, 5562, 5573, 5704, 5765
*Surface, type=ELEMENT, name="Contact 2"
"_Contact 2_S3", S3
"_Contact 2_S4", S4
"_Contact 2_S2", S2
"_Contact 2_S1", S1
** Section: Bolt
*Solid Section, elset=Bolt_All, material=Steel
,
*Elset, elset="__Bolt Pretension_blrs__S2", internal
 3238, 3762, 5270, 5285
*Elset, elset="__Bolt Pretension_blrs__S1", internal
 3245, 3389, 5228, 5354, 5522
*Elset, elset="__Bolt Pretension_blrs__S3", internal
 3268, 3314, 3769, 3831, 3918, 3997, 4544, 4875, 4878, 5245, 5263, 5456, 5497, 5711, 5847
*Elset, elset="__Bolt Pretension_blrs__S4", internal
 5230, 5231, 5278, 5299, 5318
*Surface, type=ELEMENT, name="_Bolt Pretension_blrs_", internal
"__Bolt Pretension_blrs__S2", S2
"__Bolt Pretension_blrs__S1", S1
"__Bolt Pretension_blrs__S4", S4
"__Bolt Pretension_blrs__S3", S3
*Node
   9596,           0.,           0.,           0.
*Nset, nset="_Bolt Pretension_blrn_", internal
9596,
** Pre-Tension Section for Bolt Load: Bolt Pretension
*Pre-tension Section, surface= "_Bolt Pretension_blrs_", node="_Bolt Pretension_blrn_"
*End Part
**
*Part, name=Plate
*Node
      1,       0.0625,           0.,           0.
      2,       0.0625,           0.,  0.100000001
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*Element, type=C3D8R
   1,  721,  722, 3280, 2985,   32,   33,  450,  449
   2,  722,   50,  593, 3280,   33,    1,   34,  450
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*Nset, nset=Plate_All, generate
    1,  8064,     1
*Elset, elset=Plate_All, generate
    1,  6800,     1
*Nset, nset="Contact - D1"
   6,   7,   8,  12,  22, 128
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*Elset, elset="Contact - D1"
 1386, 1394, 1395, 1396, 1411, 1412
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*Elset, elset="_Face +Z_S2", internal
 1395, 1396, 1411, 1412, 1413, 1414
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*Elset, elset="_Face +Z_S3", internal
  273,  274,  275,  276,  277,  278
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*Elset, elset="_Face +Z_S4", internal
  152,  160,  168,  176,  184,  192
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*Surface, type=ELEMENT, name="Face +Z"
"_Face +Z_S2", S2
"_Face +Z_S3", S3
"_Face +Z_S4", S4
*Elset, elset="_Face -Z_S3", internal
    1,    2,   19,   20,   37,   38
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*Elset, elset="_Face -Z_S4", internal
  793,  802,  811,  820,  829,  838
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*Elset, elset="_Face -Z_S2", internal, generate
 2889,  2952,     1
*Surface, type=ELEMENT, name="Face -Z"
"_Face -Z_S3", S3
"_Face -Z_S4", S4
"_Face -Z_S2", S2
*Elset, elset="_Internal Thread_S4", internal
 1361, 1362, 1363, 1364, 1365, 1366
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*Elset, elset="_Internal Thread_S3", internal
 1379, 1380, 1381, 1382, 1383, 1384
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*Surface, type=ELEMENT, name="Internal Thread"
"_Internal Thread_S4", S4
"_Internal Thread_S3", S3
** Section: Plate
*Solid Section, elset=Plate_All, material=Aluminium
,
*End Part
**
**
** ASSEMBLY
**
*Assembly, name=Assembly
**
*Instance, name=Plate-1, part=Plate
*End Instance
**
*Instance, name=Plate-2, part=Plate
          0.,           0.,          0.1
*End Instance
**
*Instance, name=Bolt-1, part=Bolt
          0.,           0.,        0.065
          0.,           0.,        0.065, 1.00000001268805,           0.,        0.065, 89.9999992730282
*End Instance
**
*Nset, nset=Resistance, instance=Plate-1
  3, 15, 20, 23
*Nset, nset=Set-1, instance=Plate-1
    1,    2,    3,    4,    8,   10
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*Elset, elset=Set-1, instance=Plate-1
    1,    2,    3,    4,    5,    6
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*Nset, nset=Set-2, instance=Plate-2
 23,
*Nset, nset=Set-3, instance=Plate-2
 3,
*Nset, nset=Set-4, instance=Plate-2
 15,
*Nset, nset=Set-5, instance=Plate-2
 20,
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*Elset, elset="_Preload Surface_S2", internal, instance=Bolt-1
 3238, 3762, 5270, 5285
*Elset, elset="_Preload Surface_S1", internal, instance=Bolt-1
 3245, 3389, 5228, 5354, 5522
*Elset, elset="_Preload Surface_S3", internal, instance=Bolt-1
 3268, 3314, 3769, 3831, 3918, 3997, 4544, 4875, 4878, 5245, 5263, 5456, 5497, 5711, 5847
*Elset, elset="_Preload Surface_S4", internal, instance=Bolt-1
 5230, 5231, 5278, 5299, 5318
*Surface, type=ELEMENT, name="Preload Surface"
"_Preload Surface_S2", S2
"_Preload Surface_S1", S1
"_Preload Surface_S4", S4
"_Preload Surface_S3", S3
*Elset, elset=_Surf-2_S2, internal, instance=Plate-1
    1,    2,    3,    4,    5,    6
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*Elset, elset=_Surf-2_S3, internal, instance=Plate-1
  785,  786,  787,  788,  789,  790
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*Elset, elset=_Surf-2_S4, internal, instance=Plate-1
  280,  288,  296,  304,  312,  320
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*Surface, type=ELEMENT, name=Surf-2
_Surf-2_S2, S2
_Surf-2_S3, S3
_Surf-2_S4, S4
** Constraint: Tie - Plate 1
*Tie, name="Tie - Plate 1", adjust=yes
Bolt-1."Contact 1", Plate-1."Face -Z"
** Constraint: Tie - Plate 2
*Tie, name="Tie - Plate 2", adjust=yes
Bolt-1."Contact 2", Plate-2."Face +Z"
*End Assembly
**
** MATERIALS
**
*Material, name=Aluminium
*Elastic
 6.8e+10, 0.35
*Material, name=Steel
*Elastic, depedencies=1
 2.1000e+11, 0.3, ,1
 1.9354e+11, 0.3, ,2
 1.7774e+11, 0.3, ,3
 1.6262e+11, 0.3, ,4
 1.4818e+11, 0.3, ,5
**
** INTERACTION PROPERTIES
**
*Surface Interaction, name=Friction
1.,
*Friction, slip tolerance=0.005
 0.2,
*Surface Behavior, pressure-overclosure=HARD
**
** BOUNDARY CONDITIONS
**
** Name: XYZ Type: Displacement/Rotation
*Boundary
Set-2, 1, 1
Set-2, 2, 2
Set-2, 3, 3
** Name: XZ Type: Displacement/Rotation
*Boundary
Set-3, 1, 1
Set-3, 3, 3
** Name: YZ Type: Displacement/Rotation
*Boundary
Set-5, 2, 2
Set-5, 3, 3
** Name: Z Type: Displacement/Rotation
*Boundary
Set-4, 3, 3
*Initial conditions, type=field, variable=1
Bolt-1.Bolt_All, 1
**
** INTERACTIONS
**
** Interaction: Plate to Plate
*Contact Pair, interaction=Friction, small sliding, type=SURFACE TO SURFACE
Plate-2."Face -Z", Plate-1."Face +Z"
** ----------------------------------------------------------------
**
** STEP: S1 - Pretension
**
*Step, name="S1 - Pretension", nlgeom=NO
*Static
1., 1., 1e-05, 1.
**
** LOADS
**
** Name: Bolt Pretension   Type: Bolt load
*Cload
Bolt-1."_Bolt Pretension_blrn_", 1, 10000.
**
** OUTPUT REQUESTS
**
*Restart, write, frequency=0
**
** FIELD OUTPUT: F-Output-2
**
*Output, field
*Element Output, directions=YES
STH,
**
** FIELD OUTPUT: F-Output-1
**
*Output, field, variable=PRESELECT
**
** HISTORY OUTPUT: H-Output-1
**
*Output, history, variable=ALL
*End Step
** ----------------------------------------------------------------
**
** STEP: S2 - Resistance
**
*Step, name="S2 - Resistance", nlgeom=NO
*Static
1., 1., 1e-05, 1.
**
** BOUNDARY CONDITIONS
**
** Name: XYZ Type: Displacement/Rotation
*Boundary, op=NEW
Set-2, 1, 1
Set-2, 2, 2
Set-2, 3, 3
** Name: XZ Type: Displacement/Rotation
*Boundary, op=NEW
Set-3, 1, 1
Set-3, 3, 3
** Name: YZ Type: Displacement/Rotation
*Boundary, op=NEW
Set-5, 2, 2
Set-5, 3, 3
** Name: Z Type: Displacement/Rotation
*Boundary, op=NEW
Set-4, 3, 3
** Name: Bolt Pretension Type: Bolt load
*Boundary, op=NEW, fixed
Bolt-1."_Bolt Pretension_blrn_", 1, 1
**
** LOADS
**
** Name: Bolt Pretension   Type: Bolt load
*Cload, op=NEW
** Name: Resistance   Type: Surface traction
*Dsload
Surf-2, TRSHR, 10000., 2.95314e-16, -1.38778e-16, -1.
**
** OUTPUT REQUESTS
**
*Restart, write, frequency=0
**
** FIELD OUTPUT: F-Output-2
**
*Output, field
*Element Output, directions=YES
STH,
**
** FIELD OUTPUT: F-Output-1
**
*Output, field, variable=PRESELECT
**
** HISTORY OUTPUT: H-Output-1
**
*Output, history, variable=ALL
*End Step
** STEP: reduce 1
**
*Step, name=reduction1, nlgeom=NO
*Static
1., 1., 1e-05, 1.
** PDD - Bolt modulus reduced using filed variables
*Field, variable=1
Bolt-1.Bolt_All, 2
**
** OUTPUT REQUESTS
**
*Restart, write, frequency=0
**
** FIELD OUTPUT: F-Output-1
**
*Output, field, variable=PRESELECT
**
** HISTORY OUTPUT: H-Output-1
**
*Output, history, variable=PRESELECT
*End Step
** STEP: reduce 2
**
*Step, name=reduction2, nlgeom=NO
*Static
1., 1., 1e-05, 1.
** PDD - Bolt modulus reduced using filed variables
*Field, variable=1
Bolt-1.Bolt_All, 3
**
** OUTPUT REQUESTS
**
*Restart, write, frequency=0
**
** FIELD OUTPUT: F-Output-1
**
*Output, field, variable=PRESELECT
**
** HISTORY OUTPUT: H-Output-1
**
*Output, history, variable=PRESELECT
*End Step
** STEP: reduce 3
**
*Step, name=reduction3, nlgeom=NO
*Static
1., 1., 1e-05, 1.
** PDD - Bolt modulus reduced using filed variables
*Field, variable=1
Bolt-1.Bolt_All, 4
**
** OUTPUT REQUESTS
**
*Restart, write, frequency=0
**
** FIELD OUTPUT: F-Output-1
**
*Output, field, variable=PRESELECT
**
** HISTORY OUTPUT: H-Output-1
**
*Output, history, variable=PRESELECT
*End Step
** STEP: reduce 4
**
*Step, name=reduction4, nlgeom=NO
*Static
1., 1., 1e-05, 1.
** PDD - Bolt modulus reduced using filed variables
*Field, variable=1
Bolt-1.Bolt_All, 5
**
** OUTPUT REQUESTS
**
*Restart, write, frequency=0
**
** FIELD OUTPUT: F-Output-1
**
*Output, field, variable=PRESELECT
**
** HISTORY OUTPUT: H-Output-1
**
*Output, history, variable=PRESELECT
*End Step
